// SBML level 2 version 3
// Generated 27-Nov-2014 17:57:08 (GMT+00:59)
// Generated by MathSBML 1203-002
// Generated using Mathematica Version 10.0 for Mac OS X x86 (64-bit) (June 29, 2014)

model minimal_sRNA()
  // Minimal model including sRNA
  // This is a Systems Biology Markup Language (SBML) file, generated by MathSBML 1203-002 27-Nov-2014 17:57:08 (GMT+00:59). SBML is a form of XML, and most XML files will not display properly in an internet browser. To view the contents of an XML file use the "Page Source" or equivalent button on you browser.

  // Compartments:
  compartment cell; cell has volume;

  // Species:
  species S in cell = 0;
  species U in cell = 0;
  species X in cell = 0;
  species R in cell = 0;
  species P in cell = 0;
  species W in cell = 0;
  species F in cell = 0;
  species $null in cell;

  // Reactions:
  r1: $null -> S; k1;
    k1 = 1;
  r2: S -> U; k2*S;
    k2 = 0.918075736;
  r3: U -> R; k3*U;
    k3 = 0.212948443;
  r4: $null -> X; k4*(R + U);  // modifiers: U, R
    k4 = 0.003465736;
  r5: X -> P; k5*X;
    k5 = 0.058224363;
  r6: $null -> W; k12;
    k12 = 1;
  r7: W -> F; k22*W;
    k22 = 1.848392;
  r8: U -> $null; r8_k9*U;
    r8_k9 = 0.046209812;
  r9: R -> $null; r9_k9*R;
    r9_k9 = 0.046209812;
  r10: P -> $null; k11*P;
    k11 = 0.011552453;
  r11: F -> $null; F*k92;
    k92 = 0.046209812;
end
