// SBML level 2 version 4

model minimal_system()

  // Compartments:
  compartment default = 1 volume;

  // Species:
  species inflow in default = 0;
  species S in default = 0;
  species U in default = 0;
  species R in default = 0;
  species X in default = 0;
  species P in default = 0;
  species degraded in default = 0;
  species W in default = 0;
  species F in default = 0;
  species Q in default = 0;
  species Cs in default = 0;
  species Cl in default = 0;

  // Parameters:
  k1 = 0.018 time; k1 is "transcription initiation";
  k2 = 1 time; k2 is "transcription elongation";
  k3 = 0.018 time; k3 is "transcription elongation";
  k4 = 0.033 time; k4 is "translation initiation";
  k5 = 0.015 time; k5 is "translation elongation";
  k9 = 0.011 time; k9 is "RNA degradation";
  k11 = 0.002 time; k11 is "protein degradation";
  k12 = 0.072 time; k12 is "sRNA transcription initiation";
  k22 = 0.74 time; k22 is "sRNA transcription elongation";
  k92 = 0.04 time; k92 is "short RNA degradation";
  k30 = 3 time; k30 is "complex formation";
  k40 = 0.02 time; k40 is "complex dissociation";
  k50 = 0.05 time; k50 is "complex degradation";
  k73 = 1 time; k73 is "hairpin formation";

  // Reactions:
  re1: inflow => S; k1;
  re2: S => U; k2*S;
  re3: U => R; k3*U;
  re4: inflow => X; k4*(U + R + Cs + Cl);  // modifiers: U, R, Cs, Cl
  re5: X => P; k5*X;
  re6: U => degraded; k9*U;
  re7: R => degraded; k9*R;
  re8: P => degraded; k11*P;
  re9: inflow => W; k12;
  re10: W => F; k22*W;
  re11: F => degraded; k92*F;
  re15: U + F => Cs; k30*U*F;
  re16: Cs => U + F; k40*Cs;
  re17: Cs => degraded; k50*Cs;
  re19: R + F => Cl; k30*F*R;
  re20: Cl => R + F; k40*Cl;
  re21: Cs => Cl; k3*Cs;
  re22: Cl => degraded; k50*Cl;
  re23: U => Q; k73*U;
  re24: Q => degraded; k92*Q;

  // Unit definitions:
  unit substance = mole;
  unit volume = litre;
  unit area = metre^2;
  unit length = metre;
  unit time = second;
end
